// COMSOL Multiphysics 6.2.0.339 model "crack.mph"
// Outline of the model tree

Parameters
  alpha = 45[deg]

Geometry
  geom1 "Geometry 1" (2D, length unit m)
    r1: Rectangle | size = {1, 1}
    ls1: LineSegment | specify1 = coord; coord1 = {0.3, 0.3}; specify2 = coord; coord2 = {0.7, 0.3}
    rot1: Rotate | input = ls1; rot = alpha; specifycenter = vertex; center = ls1(1) points 1
    fin: Finalize "Form Union"

Materials
  mat1: Common "Material 1" on all domains
    def "Basic"
      density = 4000
    Enu "Young's modulus and Poisson's ratio"
      E = 200[GPa]
      nu = 0.3

Physics
  solid: SolidMechanics on all domains
    dependent variable u = {u, v, w}
    lemm1: LinearElasticModel "Linear Elastic Material 1" (default)
    free1: Free (default)
    init1: init "Initial Values 1" (default)
    crack1: Crack on boundaries 4
      vce1: VirtualCrackExtension on boundaries 4
      jint1: JIntegral on points 3
    bndl1: BoundaryLoad on boundaries 3 | FperArea = {0, 100[MPa], 0}
    fix1: Fixed "Fixed Constraint 1" on boundaries 1, 2, 5

Mesh
  mesh1 "Mesh 1" (physics-controlled)
    size: MeshSizeDefault | hauto = 4

Studies
  std1 "Study 1"
    stat: Stationary

Solver configurations
  sol1 "Solution 1" (study std1)
    v1: Variables "Dependent Variables 1"
    s1: Stationary "Stationary Solver 1"
      dDef: Direct
      fc1: FullyCoupled | linsolver = dDef

Datasets
  dset1: Solution | solution = sol1

Plots
  pg1: PlotGroup2D "Stress (solid)" | data = dset1
    surf1: Surface | expr = solid.misesGp
      def: Deform "Deformation" | expr = {u, v}
  pg3: PlotGroup2D "Cracks (solid)" | data = dset1
    arpt1: ArrowPoint "Crack Growth Direction (Crack 1)"
      expr = {solid.crack1.e1X*solid.crack1.crackSize, solid.crack1.e1Y*solid.crack1.crackSize}
    con1: Contour "J-Integral 1, Integration Path"
      expr = sqrt((X-solid.crack1.jint1.Xp)^2+(Y-solid.crack1.jint1.Yp)^2)
      levelmethod = levels
      levels = solid.crack1.jint1.r
    ann1: Annotation "J-Integral 1, Evaluation" | text = J=eval(solid.crack1.jint1.J)