// COMSOL Multiphysics 6.2.0.339 model "electr_inf.mph"
// Outline of the model tree

Coordinate systems
  ie1: InfiniteElement "Infinite Element Domain 1" on domains 1-4, 6, 9-11

Geometry
  geom1 "Geometry 1" (2D, length unit m)
    r1: Rectangle | pos = {-1, -0.2}; size = {2, 0.05}
    r2: Rectangle | pos = {-1, 0.2}; size = {2, 0.05}
    r3: Rectangle
      base = center
      layername = Layer 1
      layer = 0.1
      layerleft = on
      layerright = on
      layertop = on
      size = {10, 10}
    fin: Finalize "Form Union"

Materials
  mat1: Common "1006 [solid,oxidized]" on domains 7, 8
    def "Basic"
      thermalconductivity = k(T)
      resistivity = res(T)
      thermalexpansioncoefficient = (alpha(T)+(Tempref-293[K])*if(abs(T-Tempref)>1e-3,(alpha(T)-alpha(Tempref))/(T-Tempref),d(alpha(T),T)))/(1+alpha(Tempref)*(Tempref-293[K]))
      heatcapacity = C(T)
      electricconductivity = sigma(T)
      emissivity = epsilon_solid_oxidized_1(T)
      density = rho(T)
      TD = TD(T)
      k: Piecewise | arg = T; pieces = {77.0, 1255.41, 106.6114-0.1697584*T^1+2.508465E-4*T^2-2.494362E-7*T^3+9.690376E-11*T^4}; argunit = K; fununit = W/(m*K)
      res: Piecewise
        arg = T
        pieces = 
          {293.0, 1073.0, 6.686132E-8-5.249899E-11*T^1+9.302018E-13*T^2-4.65413E-18*T^3}
          {1073.0, 1573.16, 2.11241E-7+1.129333E-9*T^1-3.021355E-13*T^2}
        argunit = K
        fununit = ohm*m
      alpha: Piecewise | arg = T; pieces = {0.0, 960.0, 6.78762E-6+2.878178E-8*T^1-7.594277E-11*T^2+1.43191E-13*T^3-1.357067E-16*T^4+4.830576E-20*T^5}; argunit = K; fununit = 1/K
      C: Piecewise | arg = T; pieces = {293.0, 948.16, 277.658273+0.971241962*T^1-0.00152428308*T^2+1.22106567E-6*T^3}; argunit = K; fununit = J/(kg*K)
      sigma: Piecewise
        arg = T
        pieces = 
          {293.0, 1073.0, 1/(-4.654130E-18*T^3+9.302018E-13*T^2-5.249899E-11*T+6.686132E-08)}
          {1073.0, 1573.16, 1/(-3.021355E-13*T^2+1.129333E-09*T+2.112410E-07)}
        argunit = K
        fununit = S/m
      epsilon_solid_oxidized_1: Piecewise | arg = T; pieces = {588.0, 1088.71, 1.395221-0.003891153*T^1+8.010151E-6*T^2-5.970098E-9*T^3+1.373119E-12*T^4}; argunit = K
      rho: Piecewise
        arg = T
        pieces = 
          {0.0, 30.0, 7906.743}
          {30.0, 53.0, 7905.63204+0.06730164*T^1-0.001025121*T^2+4.962534E-7*T^3+1.383301E-9*T^4}
          {53.0, 190.0, 7923.95235-0.4306436*T^1+0.002196832*T^2-6.010914E-6*T^3}
          {190.0, 960.0, 7910.92646-0.100271*T^1-3.511597E-4*T^2+1.470685E-7*T^3}
        argunit = K
        fununit = kg/m^3
      TD: Piecewise | arg = T; pieces = {293.0, 948.16, 3.807671E-5-9.794014E-8*T^1+1.667079E-10*T^2-1.631248E-13*T^3+6.130668E-17*T^4}; argunit = K; fununit = m^2/s
    ThermalExpansion
      alphatan = CTE(T)
      dL = (dL(T)-dL(Tempref))/(1+dL(Tempref))
      dL: Piecewise
        arg = T
        pieces = 
          {0.0, 30.0, -0.00197162076}
          {30.0, 110.0, -0.00191074076-3.518812E-6*T^1+5.140443E-8*T^2-5.849422E-11*T^3}
          {110.0, 215.0, -0.00296741804+1.81617E-5*T^1-9.276156E-8*T^2+2.54081E-10*T^3}
          {215.0, 960.0, -0.00234185521+4.083948E-6*T^1+1.512293E-8*T^2-6.083782E-12*T^3}
        argunit = K
      CTE: Piecewise
        arg = T
        pieces = 
          {91.0, 400.0, -3.482149E-6+1.265098E-7*T^1-3.745646E-10*T^2+4.692131E-13*T^3-1.879297E-16*T^4}
          {400.0, 550.0, 3.71822379E-5-1.761777E-7*T^1+3.878031E-10*T^2-2.554622E-13*T^3}
          {550.0, 960.0, -7.25250632E-6+6.376279E-8*T^1-4.206483E-11*T^2}
        argunit = K
        fununit = 1/K
    Enu "Young's modulus and Poisson's ratio"
      E = E(T)
      nu = nu(T)
      E: Piecewise
        arg = T
        pieces = 
          {4.0, 273.0, 2.217366E11+5020008.0*T^1-305140.4*T^2+926.6601*T^3-1.145454*T^4}
          {273.0, 1050.0, 2.11026989E11+3.572844E7*T^1-106319.6*T^2}
          {1050.0, 1500.0, 2.02449497E11-6.77381E7*T^1}
        argunit = K
        fununit = Pa
      nu: Piecewise
        arg = T
        pieces = 
          {4.0, 120.0, 0.2850355-1.662951E-6*T^1}
          {120.0, 273.0, 0.28474914-7.147353E-6*T^1+6.558945E-8*T^2}
          {273.0, 1053.0, 0.271114512+7.030261E-5*T^1-3.856929E-8*T^2+1.246582E-11*T^3}
          {1053.0, 1500.0, 0.316398425-1.242823E-6*T^1+1.661461E-9*T^2}
        argunit = K
    KG "Bulk modulus and shear modulus"
      K = kappa(T)
      G = mu(T)
      mu: Piecewise
        arg = T
        pieces = 
          {4.0, 273.0, 8.626526E10+1636497.0*T^1-108981.6*T^2+291.1261*T^3-0.3377859*T^4}
          {273.0, 1050.0, 8.30237093E10+9184755.0*T^1-38834.5*T^2}
          {1050.0, 1500.0, 7.69464143E10-2.580357E7*T^1}
        argunit = K
        fununit = Pa
      kappa: Piecewise
        arg = T
        pieces = 
          {4.0, 100.0, 1.800573E11-3478717.0*T^1+151512.1*T^2-5485.327*T^3+28.28329*T^4}
          {100.0, 273.0, 1.81842391E11-4.023792E7*T^1+84204.68*T^2-93.09453*T^3}
          {273.0, 1500.0, 1.84220483E11-2.509462E7*T^1-28588.37*T^2}
        argunit = K
        fununit = Pa
  mat2: Common "Air [gas]" on domains 2, 4-6, 10
    def "Basic"
      thermalconductivity = k(T)
      heatcapacity = C(T)
      density = rho_gas_2(T)
      TD = TD(T)
      dynamicviscosity = eta(T)
      k: Piecewise | arg = T; pieces = {70.0, 1000.0, -8.404165E-4+1.107418E-4*T^1-8.635537E-8*T^2+6.31411E-11*T^3-1.88168E-14*T^4}; argunit = K; fununit = W/(m*K)
      C: Piecewise
        arg = T
        pieces = 
          {100.0, 375.0, 1010.96988+0.0439478992*T^1-2.92239848E-4*T^2+6.50346734E-7*T^3}
          {375.0, 1300.0, 1093.29008-0.63555211*T^1+0.00163399216*T^2-1.41293513E-6*T^3+5.59492011E-10*T^4-8.66307242E-14*T^5}
          {1300.0, 3000.0, 701.080663+0.849386727*T^1-5.8464873E-4*T^2+2.30243637E-7*T^3-4.84675815E-11*T^4+4.2350197E-15*T^5}
        argunit = K
        fununit = J/(kg*K)
      rho_gas_2: Piecewise | arg = T; pieces = {80.0, 3000.0, 352.716*T^-1}; argunit = K; fununit = kg/m^3
      TD: Piecewise
        arg = T
        pieces = 
          {300.0, 753.0, 1.713214E-4-1.204913E-6*T^1+2.839046E-9*T^2-1.532799E-12*T^3}
          {753.0, 873.16, 0.00416418-1.191227E-5*T^1+8.863636E-9*T^2}
        argunit = K
        fununit = m^2/s
      eta: Piecewise
        arg = T
        pieces = 
          {120.0, 600.0, -1.132275E-7+7.94333E-8*T^1-7.197989E-11*T^2+5.158693E-14*T^3-1.592472E-17*T^4}
          {600.0, 2150.0, 3.892629E-6+5.75387E-8*T^1-2.675811E-11*T^2+9.709691E-15*T^3-1.355541E-18*T^4}
        argunit = K
        fununit = Pa*s

Physics
  es: Electrostatics on all domains
    dependent variable V
    ccn1: ChargeConservation (default) | epsilonr_mat = userdef; epsilonr = 1
    zc1: ZeroCharge (default)
    init1: init "Initial Values 1" (default)
    pot1: ElectricPotential on boundaries 17, 19 | V0 = 5
    gnd1: Ground on boundaries 16

Mesh
  mesh1 "Mesh 1" (physics-controlled)
    size: MeshSizeDefault | hauto = 4

Studies
  std1 "Study 1"
    stat: Stationary

Solver configurations
  sol1 "Solution 1" (study std1)
    v1: Variables "Dependent Variables 1"
    s1: Stationary "Stationary Solver 1"
      dDef: Direct
      fc1: FullyCoupled | linsolver = dDef

Datasets
  dset1: Solution | solution = sol1

Plots
  pg1: PlotGroup2D "Electric Potential (es)" | data = dset1
    surf1: Surface | expr = V
    str1: Streamline on boundaries 15-22 | expr = {es.Ex, es.Ey}; udist = 0.02
      col1: Color "Color Expression 1" | expr = V
      filt1: Filter | expr = !isScalingSystemDomain
  pg2: PlotGroup2D "Electric Field Norm (es)" | data = dset1
    surf1: Surface | expr = es.normE
    str1: Streamline on boundaries 15-22 | expr = {es.Ex, es.Ey}; udist = 0.02
      col1: Color "Color Expression 1" | expr = es.normE
      filt1: Filter | expr = !isScalingSystemDomain