// COMSOL Multiphysics 6.2.0.339 model "fs.mph"
// Outline of the model tree

Selections
  sel1: Explicit on no boundaries

Geometry
  geom1 "Geometry 1" (2D, length unit m)
    r1: Rectangle | size = {1, 1}
    fin: Finalize "Form Union"

Materials
  mat1: Common "Maple [black,oven dried]" on all domains
    def "Basic"
      thermalconductivity = 0.14[W/(m*K)]
      density = 600[kg/m^3]
      TD = 1.44211E-7
    Enu "Young's modulus and Poisson's ratio"
      E = 10^6
      nu = 0.3

Physics
  solid: SolidMechanics on all domains
    dependent variable u = {u, v, w}
    lemm1: LinearElasticModel "Linear Elastic Material 1" (default)
    free1: Free (default)
    init1: init "Initial Values 1" (default)
    bndl1: BoundaryLoad on boundaries 1 | FperArea = {10000, 10000, 0}
    fix1: Fixed "Fixed Constraint 1" on boundaries 3, 4

Mesh
  mesh1 "Mesh 1" (physics-controlled)

Studies
  std1 "Study 1"
    stat: Stationary

Solver configurations
  sol1 "Solution 1" (study std1)
    v1: Variables "Dependent Variables 1"
    s1: Stationary "Stationary Solver 1"
      dDef: Direct
      fc1: FullyCoupled | linsolver = dDef

Datasets
  dset1: Solution | solution = sol1

Plots
  pg1: PlotGroup2D "Stress (solid)" | data = dset1
    surf1: Surface | expr = solid.PGpyX; descr = First Piola–Kirchhoff stress, yX-component
      def: Deform "Deformation" | expr = {u, v}; descr = Displacement field