// COMSOL Multiphysics 6.2.0.339 model "fs1.mph"
// Outline of the model tree

Geometry
  geom1 "Geometry 1" (2D, length unit m)
    r1: Rectangle | pos = {-0.4, -0.7}; size = {0.9, 1.3}
    ls1: LineSegment | specify1 = coord; coord1 = {-0.3, 0}; specify2 = coord; coord2 = {0.3, 0}
    fin: Finalize "Form Union"

Materials
  mat4: Common "Ti - 0.15 Pd (Grade 7) [solid,annealed]" on domains 1
    def "Basic"
      thermalconductivity = k(T)
      Syt = Syt(T)
      thermalexpansioncoefficient = (alpha_solid_1(T)+(Tempref-293[K])*if(abs(T-Tempref)>1e-3,(alpha_solid_1(T)-alpha_solid_1(Tempref))/(T-Tempref),d(alpha_solid_1(T),T)))/(1+alpha_solid_1(Tempref)*(Tempref-293[K]))
      heatcapacity = C_solid_1(T)
      density = rho_solid_1(T)
      TD = TD(T)
      elong = elong(T)
      k: Piecewise
        arg = T
        pieces = 
          {0.0, 49.0, 1.47203494*T^1-0.00748788311*T^2+6.93238802E-4*T^3-3.09283072E-5*T^4+2.94008701E-7*T^5}
          {49.0, 350.0, 60.278896-0.576939315*T^1+0.00429043707*T^2-1.81326748E-5*T^3+4.23859557E-8*T^4-5.09360595E-11*T^5+2.45315909E-14*T^6}
          {350.0, 977.0, 64.7176575-0.361266955*T^1+0.00121955168*T^2-2.26082437E-6*T^3+2.38879699E-9*T^4-1.34012745E-12*T^5+3.09854262E-16*T^6}
          {977.0, 1950.0, 12.3969792+0.0103457471*T^1-3.14407683E-6*T^2+1.07006076E-9*T^3}
        argunit = K
        fununit = W/(m*K)
      Syt: Piecewise | arg = T; pieces = {293.0, 588.71, 1.09808274E9-2638875.63*T^1+1950.72016*T^2}; argunit = K; fununit = Pa
      alpha_solid_1: Piecewise | arg = T; pieces = {0.0, 1144.0, 5.034683E-6+2.527512E-8*T^1-7.155452E-11*T^2+1.068357E-13*T^3-7.796841E-17*T^4+2.218768E-20*T^5}; argunit = K; fununit = 1/K
      C_solid_1: Piecewise
        arg = T
        pieces = 
          {100.0, 300.0, -167.746811+7.08658306*T^1-0.0297849253*T^2+6.04477124E-5*T^3-4.76258862E-8*T^4}
          {300.0, 900.0, 464.052042+0.152465588*T^1+2.12593015E-4*T^2-1.72017085E-7*T^3}
          {900.0, 1156.0, -33066.629+136.77383*T^1-0.204810858*T^2+1.3350416E-4*T^3-3.17182178E-8*T^4}
          {1156.0, 1944.0, 352.825758+0.123047884*T^1+6.65722934E-5*T^2}
        argunit = K
        fununit = J/(kg*K)
      rho_solid_1: Piecewise
        arg = T
        pieces = 
          {0.0, 2.0, 4530.3231}
          {2.0, 180.0, 4530.3603-0.0204366307*T^1+9.49771346E-4*T^2-1.6337801E-5*T^3+8.39112477E-8*T^4-1.48992664E-10*T^5}
          {180.0, 1144.0, 4535.5915-0.0432444438*T^1-2.26412288E-4*T^2+3.19459775E-7*T^3-2.29209277E-10*T^4+6.09868366E-14*T^5}
        argunit = K
        fununit = kg/m^3
      TD: Piecewise
        arg = T
        pieces = 
          {100.0, 173.0, 1.3177325E-4-2.48289978E-6*T^1+2.17840138E-8*T^2-9.91015438E-11*T^3+2.28628554E-13*T^4-2.12074207E-16*T^5}
          {173.0, 573.0, 3.53824383E-5-2.40996458E-7*T^1+9.02329928E-10*T^2-1.77181972E-12*T^3+1.75566018E-15*T^4-6.87438172E-19*T^5}
          {573.0, 893.0, 1.83000721E-5-5.33751634E-8*T^1+9.55526007E-11*T^2-7.88687157E-14*T^3+2.55319034E-17*T^4}
          {893.0, 1144.0, 0.00295737317-1.41494076E-5*T^1+2.69236691E-8*T^2-2.54102371E-11*T^3+1.18997168E-14*T^4-2.21425787E-18*T^5}
        argunit = K
        fununit = m^2/s
      elong: Piecewise | arg = T; pieces = {293.0, 588.71, 215.669373-1.57908686*T^1+0.00413484667*T^2-3.33815069E-6*T^3}; argunit = K
    ThermalExpansion
      dL = (dL_solid_1(T)-dL_solid_1(Tempref))/(1+dL_solid_1(Tempref))
      dL_solid_1: Piecewise
        arg = T
        pieces = 
          {0.0, 60.0, -0.00149093743-2.5E-8*T^1+6.25E-9*T^2}
          {60.0, 200.0, -0.00174469267+2.06346114E-5*T^1-6.15632414E-7*T^2+8.73680313E-9*T^3-6.02408298E-11*T^4+2.04927885E-13*T^5-2.74884259E-16*T^6}
          {200.0, 1144.0, -0.00130828925-4.72948429E-6*T^1+5.74408148E-8*T^2-1.25795799E-10*T^3+1.50784011E-13*T^4-9.19119542E-17*T^5+2.2474283E-20*T^6}
        argunit = K
    Enu "Young's modulus and Poisson's ratio"
      E = E(T)
      nu = nu(T)
      E: Piecewise
        arg = T
        pieces = 
          {93.0, 293.0, 1.263539E11-4.823066E7*T^1-32810.22*T^2}
          {293.0, 1073.16, 1.267923E11-5.931971E7*T^1}
        argunit = K
        fununit = Pa
      nu: Piecewise | arg = T; pieces = {293.0, 1073.16, 0.3207911+6.715403E-5*T^1-4.131016E-8*T^2+5.510325E-11*T^3}; argunit = K
    KG "Bulk modulus and shear modulus"
      K = kappa(T)
      G = mu(T)
      mu: Piecewise | arg = T; pieces = {293.0, 1073.16, 4.783492E10-2.376622E7*T^1}; argunit = K; fununit = Pa
      kappa: Piecewise | arg = T; pieces = {293.0, 1073.16, 1.056124E11+4.642769E7*T^1-82798.6*T^2}; argunit = K; fununit = Pa
    ElastoplasticModel "Elastoplastic material model"
      sigmags = Sys(T)
      Hillcoefficients = {0, 0, 0, 0, 0, 0}
      ys = {0, 0, 0, 0, 0, 0}
      Sys: Piecewise | arg = T; pieces = {293.0, 588.71, 9.90670016E8-2700592.99*T^1+2077.90831*T^2-0.0859695985*T^3}; argunit = K; fununit = Pa

Physics
  solid: SolidMechanics on domains 1
    dependent variable u = {u, v, w}
    lemm1: LinearElasticModel "Linear Elastic Material 1" (default)
    free1: Free (default)
    init1: init "Initial Values 1" (default)
    bndl1: BoundaryLoad on boundaries 5 | FperArea = {1000000, 10000, 0}
    bndl2: BoundaryLoad on boundaries 1 | FperArea = {-100000, -10000, 0}
    crack1: Crack on boundaries 4 | CrackSurface = Slit; CrackFront: points 3, 4
      jint1: JIntegral on points 4
        IntegrationPath = Circular
        IntegrationPointsContour = Relative
        NGamma = 10000
        Path: boundaries 4

Mesh
  mesh1 "Mesh 1" (physics-controlled)

Studies
  std1 "Study 1"
    stat: Stationary

Solver configurations
  sol1 "Solution 1" (study std1)
    v1: Variables "Dependent Variables 1"
    s1: Stationary "Stationary Solver 1" | stol = 0.1
      dDef: Direct
      fc1: FullyCoupled | linsolver = dDef

Datasets
  dset1: Solution | solution = sol1

Plots
  pg2: PlotGroup2D "Stress (solid) 1" | data = dset1
    surf1: Surface | expr = solid.crack1.jint1.KIII; descr = Stress intensity factor, mode III
      def: Deform "Deformation" | expr = {u, v}; descr = Displacement field