// COMSOL Multiphysics 6.2.0.339 model "kontakt.mph"
// Outline of the model tree

Parameters
  E1 = 70[GPa]  // Block Young's modulus
  E2 = 210[GPa]  // Cylinder Young's modulus
  nu0 = 0.3  // Poisson's ratio
  Fn = 35[kN]  // External load
  E_star = 2*E1*E2/((E1+E2)*(1-nu0^2))  // Combined Young's modulus
  R = 50[mm]  // Combined radius
  d = 200[mm]  // Block width
  th = 1[mm]  // Thickness
  lc = 10[mm]  // Estimated contact length
  a = sqrt(8*Fn*R/(pi*E_star*th))  // Analytical contact length
  pmax = sqrt(Fn*E_star/(2*pi*R*th))  // Maximum contact pressure
  dist = 1[mm]  // Initial distance between parts
  k = 0  // Spring coefficient

Variables
  var1 "Variables 1"
    p_anal = pmax*sqrt(1-(x/a)^2)

Pairs
  p1: Contact "Contact Pair 1"

Geometry
  geom1 "Geometry 1" (2D, length unit m)
    r1: Rectangle | pos = {80, 0}; size = {120, 200}
    c1: Circle | pos = {80, 260}; rot = -90; r = 60; angle = 180
    sq1: Square | pos = {90, 190}; base = center; size = 20
    pt1: Point | geomattr = {construction, on}; geomattrlevel = 16; p = {80, 200}
    rot1: Rotate | input = pt1; rot = 18; pos = {80, 260}
    spl1: Split | input = c1, rot1
    csol1: ConvertToSolid | input = spl1, sq1
    fin: Finalize "Form Assembly" | action = assembly; splitpairs = on; pairtype = contact; frame = mesh
    mcd1: MeshControlDomains | input = fin(1) domains 2

Materials
  mat1: Common "Material 1" on domains 1
    def "Basic"
      density = 1
    Enu "Young's modulus and Poisson's ratio"
      E = 70000
      nu = 0.3
  mat2: Common "Material 2" on domains 3
    def "Basic"
      density = 1
    Enu "Young's modulus and Poisson's ratio"
      E = 210000
      nu = 0.1

Physics
  solid: SolidMechanics on all domains
    dependent variable u = {u, v, w}
    lemm1: LinearElasticModel "Linear Elastic Material 1" (default)
    free1: Free (default)
    init1: init "Initial Values 1" (default)
    dcnt1: SolidContact "Contact 1" (default)
    sym1: SymmetrySolid "Symmetry 1" on boundaries 1, 7, 9
    fix1: Fixed "Fixed Constraint 1" on boundaries 2
    pl1: PointLoad on points 8 | Fp = {0, 35000, 0}
    spf1: SpringFoundation1 on boundaries 9

Mesh
  mesh1 "Mesh 1"
    size: MeshSizeDefault | hauto = 2
    ftri2: FreeTri "Free Triangular 2" on domains 3
    map1: Map "Mapped 1" on no domains
      dis3: Distribution on boundaries 5, 6, 8, 10

Studies
  std1 "Study 1"
    stat: Stationary

Solver configurations
  sol1 "Solution 1" (study std1)
    v1: Variables "Dependent Variables 1"
      comp1_u: Field "Displacement Field (comp1.u)" | scalemethod = manual; scaleval = 1e-2*341.760149813
    s1: Stationary "Stationary Solver 1"
      dDef: Direct
      fc1: FullyCoupled | linsolver = dDef; dtech = ddog

Datasets
  dset1: Solution | solution = sol1

Plots
  pg1: PlotGroup2D "Stress (solid)" | data = dset1
    surf1: Surface | expr = solid.misesGp
      def: Deform "Deformation" | expr = {u, v}; descr = Displacement field
  pg2: PlotGroup1D "1D Plot Group 2" | data = dset1
    lngr1: LineGraph (disabled) on boundaries 5 | data = dset1; expr = pmax; unit = MPa; xdata = expr
    lngr2: LineGraph | data = dset1; expr = p_anal; unit = MPa