// COMSOL Multiphysics 6.2.0.339 model "thermflu_nw.mph"
// Outline of the model tree

Geometry
  geom1 "Geometry 1" (2D, length unit m)
    r1: Rectangle | pos = {-0.65, -0.85}; size = {1.2, 1.4}
    fin: Finalize "Form Union"

Materials
  mat2: Common "H2O (water) [liquid]" on domains 1
    def "Basic"
      thermalconductivity = k_liquid_2(T)
      thermalexpansioncoefficient = (alpha_liquid_2(T)+(Tempref-293[K])*if(abs(T-Tempref)>1e-3,(alpha_liquid_2(T)-alpha_liquid_2(Tempref))/(T-Tempref),d(alpha_liquid_2(T),T)))/(1+alpha_liquid_2(Tempref)*(Tempref-293[K]))
      heatcapacity = C_liquid_2(T)
      HC = HC_liquid_2(T)
      VP = VP_liquid_2(T)
      density = rho_liquid_2(T)
      TD = TD_liquid_2(T)
      dynamicviscosity = eta_liquid_1(T)
      SurfF = SurfF(T)
      k_liquid_2: Piecewise | arg = T; pieces = {275.0, 370.0, -0.9003748+0.008387698*T^1-1.118205E-5*T^2}; argunit = K; fununit = W/(m*K)
      alpha_liquid_2: Piecewise
        arg = T
        pieces = 
          {273.15, 283.0, 0.01032507-7.62815E-5*T^1+1.412474E-7*T^2}
          {283.0, 373.16, -0.00246418935+1.947611E-5*T^1-5.049672E-8*T^2+4.616995E-11*T^3}
        argunit = K
        fununit = 1/K
      C_liquid_2: Piecewise | arg = T; pieces = {293.0, 373.16, 4035.84079+0.492312034*T^1}; argunit = K; fununit = J/(kg*K)
      HC_liquid_2: Piecewise | arg = T; pieces = {293.0, 373.16, 72.6451184+0.00886161577*T^1}; argunit = K; fununit = J/(mol*K)
      VP_liquid_2: Piecewise | arg = T; pieces = {280.0, 600.0, (exp((-2.00512183e+03/T-5.56570000e-01*log10(T)+9.89879000e+00-1.11169009e+07/T^3)*log(10.0)))*1.33320000e+02}; argunit = K; fununit = Pa
      rho_liquid_2: Piecewise
        arg = T
        pieces = 
          {273.15, 283.0, 972.757815+0.2084*T^1-4.0E-4*T^2}
          {283.0, 373.16, 345.28+5.749816*T^1-0.0157244*T^2+1.264375E-5*T^3}
        argunit = K
        fununit = kg/m^3
      TD_liquid_2: Piecewise | arg = T; pieces = {273.15, 333.16, 8.04E-8+2.0E-10*T^1}; argunit = K; fununit = m^2/s
      eta_liquid_1: Piecewise | arg = T; pieces = {265.0, 423.16, exp(1.47297892E+11/T^4 - 1.56916127E+09/T^3 + 6.52798499E+06/T^2 - 1.10421451E+04/T - 2.86320560E+00)}; argunit = K; fununit = Pa*s
      SurfF: Piecewise
        arg = T
        pieces = 
          {274.0, 568.0, 0.0774685638+2.071003E-4*T^1-1.23147E-6*T^2+2.344068E-9*T^3-3.033107E-12*T^4+1.758716E-15*T^5}
          {568.0, 647.0, -109.3735+0.9291756*T^1-0.003154159*T^2+5.351438E-6*T^3-4.539449E-9*T^4+1.540327E-12*T^5}
        argunit = K
        fununit = N/m
    ThermalExpansion
      alphatan = CTE_liquid_2(T)
      dL = (dL_liquid_2(T)-dL_liquid_2(Tempref))/(1+dL_liquid_2(Tempref))
      dL_liquid_2: Piecewise
        arg = T
        pieces = 
          {273.15, 283.0, 0.00848615773-6.947021E-5*T^1+1.333373E-7*T^2}
          {283.0, 373.16, 0.232446447-0.002030447*T^1+5.510259E-6*T^2-4.395999E-9*T^3}
        argunit = K
      CTE_liquid_2: Piecewise
        arg = T
        pieces = 
          {273.15, 283.0, -6.947321E-5+2.666746E-7*T^1}
          {283.0, 293.0, -0.0136371499+8.893977E-5*T^1-1.43925E-7*T^2}
          {293.0, 373.16, -0.00203045035+1.102052E-5*T^1-1.3188E-8*T^2}
        argunit = K
        fununit = 1/K

Physics
  spf: LaminarFlow on all domains
    dependent variable u = {u, v, w}
    PhysicalModelProperty.Compressibility = WeaklyCompressible
    PhysicalModelProperty.IncludeGravity = 1
    AdvancedSettingProperty.UsePseudoTime = 1
    fp1: FluidProperties (default)
    init1: init "Initial Values 1" (default)
    wallbc1: WallBC "Wall 1" (default)
    grav1: Gravity
    prpc1: PressurePointConstraint on points 4 | p0 = 1; CompensateForHydrostaticPressureApproximation = 0
  ht: HeatTransferInFluids on all domains
    dependent variable T
    ShapeProperty.order_temperature = 1
    PhysicalModelProperty.dz = 1[m]
    fluid1: FluidHeatTransferModel "Fluid 1" (default)
    init1: init "Initial Values 1" (default)
    ins1: ThermalInsulation (default)
    temp1: TemperatureBoundary "Temperature 1" on boundaries 1 | T0 = 270[K]
    temp2: TemperatureBoundary "Temperature 2" on boundaries 4 | T0 = 303.15[K]

Multiphysics
  nitf1: NonIsothermalFlow on all domains | Fluid_physics = spf; Heat_physics = ht

Mesh
  mesh1 "Mesh 1" (physics-controlled)
    size: MeshSizeDefault | table = cfd; hauto = 6

Studies
  std1 "Study 1"
    stat: Stationary

Solver configurations
  sol1 "Solution 1" (study std1)
    v1: Variables "Dependent Variables 1"
    s1: Stationary "Stationary Solver 1" | stol = 0.01
      fc1: FullyCoupled
        linsolver = d1
        dtech = const
        maxiter = 150
        damp = 0.8
        stabacc = cflcmp
        kipid = 0.15
        kdpid = 0.15
        cflaa = on
        cflaacfl = 9000
        cflaafact = 1
      d1: Direct "Direct, nonisothermal flow (nitf1) (Merged)" | pivotperturb = 1.0E-6; usetotmemory = 0.9

Datasets
  dset1: Solution | solution = sol1